---- AnyBody Output File ---------------------------------
Study: Main.MyStudy
Operation: Main.MyStudy.KinematicAnalysis
----------------------------------------------------------
Constants (Name = Value):
Main.MyStudy.outputfile.FileName = "OutputTest.txt"
Main.MyStudy.outputfile.NumberFormat.Digits = 15
Main.MyStudy.outputfile.NumberFormat.Width = 22
Main.MyStudy.outputfile.NumberFormat.Style = ScientificNumber
Main.MyStudy.outputfile.NumberFormat.FormatStr = "%22.15e"
Main.MyStudy.outputfile.Search = "..MyModel.jnt.*"
Main.MyStudy.outputfile.SepSign = " "
Main.MyStudy.outputfile.LineSepSign = ""
Main.MyStudy.outputfile.Header.TitleSectionOnOff = On
Main.MyStudy.outputfile.Header.ConstSectionOnOff = On
Main.MyStudy.outputfile.Header.VarSectionOnOff = On
Main.MyStudy.outputfile.Header.ColumnNamesOnOff = On
Main.MyStudy.outputfile.Header.LinePrefix = ""
Main.MyModel.jnt.t = 0.000000000000000e+000
Main.MyModel.jnt.MeasureOrganizer = {8}
Main.MyModel.jnt.Axis = x
Main.MyModel.jnt.Ref = 0
----------------------------------------------------------
Variables (Column# Name):
col0  Main.MyStudy.t
col1  Main.MyStudy.outputfile.ref
col2  Main.MyModel.jnt.Pos
col3  Main.MyModel.jnt.Vel
col4  Main.MyModel.jnt.Acc
----------------------------------------------------------
Main.MyStudy.t Main.MyStudy.outputfile.ref Main.MyModel.jnt.Pos Main.MyModel.jnt.Vel Main.MyModel.jnt.Acc
0.000000000000000e+000 0.000000000000000e+000 0.000000000000000e+000 6.283185306301335e+000 0.000000000000000e+000
1.000000000000000e-002 6.283186329091303e-002 6.283186329091303e-002 6.283185306301332e+000 0.000000000000000e+000
2.000000000000000e-002 1.256637163876787e-001 1.256637163876787e-001 6.283185306301335e+000 0.000000000000000e+000
3.000000000000000e-002 1.884955694844090e-001 1.884955694844090e-001 6.283185306301335e+000 0.000000000000000e+000
4.000000000000000e-002 2.513274225787591e-001 2.513274225787591e-001 6.283185306301333e+000 0.000000000000000e+000
5.000000000000000e-002 3.141592756709331e-001 3.141592756709331e-001 6.283185306301338e+000 0.000000000000000e+000
6.000000000000001e-002 3.769911287598573e-001 3.769911287598573e-001 6.283185306301332e+000 0.000000000000000e+000
7.000000000000001e-002 4.398229818461649e-001 4.398229818461649e-001 6.283185306301335e+000 0.000000000000000e+000
8.000000000000000e-002 5.026548349294127e-001 5.026548349294127e-001 6.283185306301331e+000 0.000000000000000e+000
9.000000000000000e-002 5.654866880095976e-001 5.654866880095976e-001 6.283185306301335e+000 0.000000000000000e+000
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1.000000000000001e+000 6.283185307179580e+000 6.283185307179580e+000 6.283185306301335e+000 0.000000000000000e+000
